// SBML level 3 version 2

model GeneticToggleSwitch(Cell)

  // Compartments:
  compartment Cell = 1;

  // Species:
  substanceOnly species $IPTG in Cell = 0;
  substanceOnly species $aTc in Cell = 0;
  substanceOnly species YFP in Cell = 0;
  substanceOnly species aTc_TetR_protein in Cell = 0;
  substanceOnly species LacI in Cell = 60;
  substanceOnly species IPTG_LacI_protein in Cell = 0;
  substanceOnly species TetR in Cell = 0;
  substanceOnly species P0 in Cell = 2;
  substanceOnly species P1 in Cell = 2;

  // Parameters:
  kd = 0.0075; kd is "Degradation rate";
  kc_f = 0.05; kc_f is "Forward complex formation rate";
  kc_r = 1; kc_r is "Reverse complex formation rate";
  nc = 2; nc is "Stoichiometry of binding";
  kr_f = 0.5; kr_f is "Forward repression binding rate";
  kr_r = 1; kr_r is "Reverse repression binding rate";
  ka_f = 0.0033; ka_f is "Forward activation binding rate";
  ka_r = 1; ka_r is "Reverse activation binding rate";
  ko_f = 0.033; ko_f is "Forward RNAP binding rate";
  ko_r = 1; ko_r is "Reverse RNAP binding rate";
  kao_f = 1; kao_f is "Forward activated RNAP binding rate";
  kao_r = 1; kao_r is "Reverse activated RNAP binding rate";
  nr = 30; nr is "Initial RNAP count";
  ko = 0.05; ko is "Open complex production rate";
  kb = 0.0001; kb is "Basal production rate";
  ng = 2; ng is "Initial promoter count";
  np = 10; np is "Stoichiometry of production";
  ka = 0.25; ka is "Activated production rate";

  // Reactions:
  YFP_degradation_interaction: YFP => ; kd*YFP;
  aTc_TetR_protein_degradation_interaction: aTc_TetR_protein => ; kd*aTc_TetR_protein;
  LacI_degradation_interaction: LacI => ; kd*LacI;
  IPTG_LacI_protein_degradation_interaction: IPTG_LacI_protein => ; kd*IPTG_LacI_protein;
  Complex_aTc_TetR_protein: 2 $aTc + 2 TetR -> aTc_TetR_protein; kc_f*aTc^nc*TetR^nc - kc_r*aTc_TetR_protein;
  Complex_IPTG_LacI_protein: 2 $IPTG + 2 LacI -> IPTG_LacI_protein; kc_f*IPTG^nc*LacI^nc - kc_r*IPTG_LacI_protein;
  TetR_degradation_interaction: TetR => ; kd*TetR;
  Production_P0: => 10 YFP + 10 TetR; P0*ko*(ko_f/ko_r)*nr/(1 + ko_f/ko_r*nr + (kr_f/kr_r*LacI)^nc);  // modifiers: P0, LacI
  Production_P1: => 10 LacI; P1*ko*(ko_f/ko_r)*nr/(1 + ko_f/ko_r*nr + (kr_f/kr_r*TetR)^nc);  // modifiers: P1, TetR

  // Events:
  aTc_High: at (6000) after (true), t0=false, persistent=false, fromTrigger=false: aTc = 60;
  aTc_low: at (8000) after (true), t0=false, persistent=false, fromTrigger=false: aTc = 0;
  IPTG_high: at (2000) after (true), t0=false, persistent=false, fromTrigger=false: IPTG = 60;
  IPTG_low: at (4000) after (true), t0=false, persistent=false, fromTrigger=false: IPTG = 0;
end
